# Initialisation
variable T equal 300

units real
atom_style full
boundary p p p
pair_style lj/cut 14

bond_style harmonic
angle_style harmonic
dihedral_style opls
improper_style harmonic

special_bonds lj 0.0 0.0 0.5

# System definition
read_data carbon.data
include	PARM.lammps

# Simulation settings
group gcar type 1
group gmid type 1   # define gmid
group gtop type 1   # for later
group gbot type 1   # for later
variable xmax equal bound(gcar,xmax)-0.5
variable xmin equal bound(gcar,xmin)+0.5
region rtop block ${xmax} INF INF INF INF INF
region rbot block INF ${xmin} INF INF INF INF
region rmid block ${xmin} ${xmax} INF INF INF INF

# Thermalisation and dynamics
velocity gmid create ${T} 48455 mom yes rot yes
fix mynve all nve
compute Tmid gmid temp
fix myber gmid temp/berendsen ${T} ${T} 100
fix_modify myber temp Tmid

# restrain the motion of edges
group gtop type 1
group gbot type 1

fix mysf1 gtop setforce 0 NULL 0
fix mysf2 gbot setforce 0 NULL 0
velocity gtop set 0 NULL 0
velocity gbot set 0 NULL 0

# data extraction
variable	L equal xcm(gtop,x)-xcm(gbot,x)
fix 		at1 all ave/time 10 100 1000 v_L file length.dat
fix 		at2 all ave/time 10 100 1000 f_mysf1[1] f_mysf2[1] file force.dat
dump 		mydmp all atom 1000 dump.lammpstrj

# Equilibrium step
thermo 100
thermo_modify temp Tmid

# Run

timestep 1.0
run 5000

#loop
variable var loop 10
label loop
displace_atoms gtop move 0.1 0 0
displace_atoms gbot move -0.1 0 0
run 1000
next var
jump input.lammps loop
